*Heading
** Job name: Job-44345354 Model name: Model-1
** Generated by: Abaqus/CAE 2021.HF3
*Preprint, echo=NO, model=NO, history=NO, contact=NO
**
** PARTS
**
*Part, name=Part-1
*Node
      1,   9.60000038,         -20.
      2,   9.60000038,          20.
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*Element, type=CPS4R
   1,    1,    9,  577,  442
   2,    9,   10,  578,  577
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*Nset, nset=_PickedSet78, internal, generate
     1,  16290,      1
*Elset, elset=_PickedSet78, internal, generate
     1,  16200,      1
*Elset, elset=_Surf-part_S2, internal
   200,   400,   600,   800,  1000,  1200
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*Elset, elset=_Surf-part_S3, internal
  9961,  9962,  9963,  9964,  9965,  9966
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*Elset, elset=_Surf-part_S4, internal
     1,   201,   401,   601,   801,  1001
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*Surface, type=ELEMENT, name=Surf-part
_Surf-part_S2, S2
_Surf-part_S3, S3
_Surf-part_S4, S4
*Orientation, name=Ori-1
1., 0., 0., 0., 1., 0.
3, 0.
** Region: (Section-2:Picked), (Controls:Default), (Material Orientation:Picked)
*Elset, elset=_I1, internal
     1,     2,     3,     4,     5,     6
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** Section: Section-2
*Solid Section, elset=_I1, orientation=Ori-1, material=Material-1
,
** Region: (Section-2:Picked), (Controls:EC-1), (Material Orientation:Picked)
*Elset, elset=_I2, internal, generate
  3801,  10000,      1
** Section: Section-2
*Solid Section, elset=_I2, orientation=Ori-1, controls=EC-1, material=Material-1
,
*End Part
**
*Part, name=Punch
*End Part
**
**
** ASSEMBLY
**
*Assembly, name=Assembly
**
*Instance, name=Part-1-1, part=Part-1
*End Instance
**
*Instance, name=Punch-1, part=Punch
          0.,          -5.,           0.
*Node
      1,         -25.,          40.,           0.
*Nset, nset=Punch-1-RefPt_, internal
1,
*Surface, type=SEGMENTS, name=Surf-rigid
START,           0.,          40.
 LINE,         -25.,          40.
 LINE,         -25.,          25.
 LINE,           0.,          25.
 LINE,           0.,          40.
*Rigid Body, ref node=Punch-1-RefPt_, analytical surface=Surf-rigid
*End Instance
**
*Instance, name=Punch-1-lin-1-2, part=Punch
          0.,         -30.,           0.
*Node
      1,         -25.,          40.,           0.
*Nset, nset=Punch-1-lin-1-2-RefPt_, internal
1,
*Surface, type=SEGMENTS, name=Surf-rigid
START,           0.,          40.
 LINE,         -25.,          40.
 LINE,         -25.,          25.
 LINE,           0.,          25.
 LINE,           0.,          40.
*Rigid Body, ref node=Punch-1-lin-1-2-RefPt_, analytical surface=Surf-rigid
*End Instance
**
*Nset, nset=Set-1, instance=Part-1-1
    3,    5,  217,  218,  219,  220
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*Nset, nset=Set-2, instance=Part-1-1
    3,    5,  217,  218,  219,  220
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*Nset, nset=Set-3, instance=Part-1-1
     3,     4,     5,     6,   218,   219
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*Nset, nset=Set-punch, instance=Punch-1
 1,
*Nset, nset=_PickedSet98, internal, instance=Part-1-1
   7,   8, 524, 525, 526, 527
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*Elset, elset=_PickedSet98, internal, instance=Part-1-1, generate
 16161,  16200,      1
*End Assembly
**
** ELEMENT CONTROLS
**
*Section Controls, name=EC-1, ELEMENT DELETION=YES, MAX DEGRADATION=0.95
1., 1., 1.
*Amplitude, name=Amp-1
             0.,              0.,              1.,              1.
*Amplitude, name=Amp-2
             0.,              0.,              1.,              1.
*Amplitude, name=Amp-3
            0.1,             12.,              1.,             50.
*Amplitude, name=Amp-4
             0.,              0.,            0.01,              1.
*Amplitude, name=Amp-5
             0.,              0.,              1.,              1.
*Amplitude, name=Amp-7, time=TOTAL TIME
             0.,              0.,              1.,              1.
*Amplitude, name=Amp-8
             0.,              0.,             0.1,             0.1,             0.2,             0.2,             0.3,             0.3
            0.4,             0.4,             0.5,             0.5,             0.6,             0.6,             0.7,             0.7
            0.8,             0.8,             0.9,             0.9,              1.,              1.
**
** MATERIALS
**
*Material, name=Material-1
*Damage Initiation, criterion=DUCTILE
  1.,  0.,  5.
 0.5, 0.1,  5.
 0.1,100., 20.
*Damage Evolution, type=DISPLACEMENT
20.,
*Damage Initiation, criterion=MAXPS
 1e+08,
*Damage Evolution, type=DISPLACEMENT
50.,
*Damage Initiation, criterion=SHEAR, ks=0.1
  1.,  0.,  5.
 0.5, 0.1,  5.
 0.1,100., 20.
*Damage Evolution, type=ENERGY, softening=EXPONENTIAL
50.,
*Elastic
220., 0.3
*Plastic, scalestress=800.
  755.,   0.
  809., 0.01
  829., 0.02
  842.,  0.1
  895., 0.15
14000.,  20.
**
** BOUNDARY CONDITIONS
**
** Name: BC-punch Type: Displacement/Rotation
*Boundary
Set-punch, 1, 1
Set-punch, 2, 2
Set-punch, 6, 6
** ----------------------------------------------------------------
**
** STEP: Step-1
**
*Step, name=Step-1, nlgeom=YES, inc=1000000
*Static, stabilize=0.0002, allsdtol=0.05, continue=NO
1e-05, 1., 1e-12, 1.
**
** BOUNDARY CONDITIONS
**
** Name: BC-5 Type: Symmetry/Antisymmetry/Encastre
*Boundary
_PickedSet98, ENCASTRE
** Name: BC-7 Type: Displacement/Rotation
*Boundary
Set-3, 1, 1
Set-3, 2, 2, -5000.
Set-3, 6, 6
** Name: BC-punch Type: Displacement/Rotation
*Boundary, amplitude=Amp-8
Set-punch, 1, 1
Set-punch, 2, 2, -20.
Set-punch, 6, 6
**
** OUTPUT REQUESTS
**
*Restart, write, frequency=0
**
** FIELD OUTPUT: F-Output-1
**
*Output, field
*Node Output
CF, PHILSM, PSILSM, RF, U
*Element Output, directions=YES
DAMAGEMT, DAMAGET, DMICRT, LE, MVF, PE, PEEQ, PEMAG, S, STATUS
**
** HISTORY OUTPUT: H-Output-1
**
*Output, history, variable=PRESELECT
*End Step
